# Частота сигнала(Гц) | Фаза сигнала | Амплитуда сигнала(А)
f0 := 500000
φ := 0
A := 1
# Т выгрузки из буфера одного блока(Сек) | Частота дискретизации АЦП(Гц) | Опорная частота платы L-502(Гц)
T := 0.0100
fd := 2000000
fg := 2000000
# Кол-во слов в блоке(cлово 32bit) | Период дискретизации АЦП
N := T/(1/fd) = 20000
Td := 1/fd = 5e-7
n := 0 .. N - 1  # Частота дискретизации ЦАП
fDAC := fg/2
t := 0, Td/4 .. T
# Аналоговый сигнал
# Количество точек на период в оцифрованном сигнале при заданных настройках
s(t) := A*sin(2*π*f0*t + φ)  # Дискретный сигнал(АЦП)
# Востановленный аналоговый сигнал(ЦАП)
q[n] := A*sin(2*π*f0*n*Td + φ)
Point := fd/f0 = 4
Ss[n] := q[n]
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1/(0.2*10^-5) = 500000
Td := 1/fd = 5e-7
fd := 2000000
q[n] := sin(2*π*f0*n*Td)
n := 0 .. 1000
ff0 := 1000000
ff1 := 2008000
tt := 0 .. 100
ss(tt) := sin(2*3.14*ff0*tt)
sss(tt) := sin(2*3.14*ff1*tt)
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